# Расчет магнитного поля реакторной группы ПС Сморгонь 330
# [component: outputs parametr]
solinoid(x, y, z, r, h, n, t) :=
    Построение_солиноида
    for i ∈ 0 .. t
        solinoid[i, 0] ← r*cos(2*π*i*n/t) + x
        solinoid[i, 1] ← r*sin(2*π*i*n/t) + y
        solinoid[i, 2] ← h*i/t + z
    solinoid
kolco(x, y, r) :=
    Рисование_кольца
    for i ∈ 0 .. 360
        kolco[i, 0] ← r*cos(i*deg) + x
        kolco[i, 1] ← r*sin(i*deg) + y
    kolco
provod(xn, yn, zn, xk, yk, zk, t) :=
    Построение_прямого_провода
    dx ← ((xk - xn)/(t - 1))
    dy ← ((yk - yn)/(t - 1))
    dz ← ((zk - zn)/(t - 1))
    provod[0, 0] ← xn
    provod[0, 1] ← yn
    provod[0, 2] ← zn
    for i ∈ 1 .. t
        provod[i, 0] ← provod[i - 1, 0] + dx
        provod[i, 1] ← provod[i - 1, 1] + dy
        provod[i, 2] ← provod[i - 1, 2] + dz
    provod
KRS(parametr) :=
    Подпрограмма_расстановки_реакторов
    0
    if parametr[1, 1] == "Т"
        KRS[0, 0] ← cos(parametr[2, 1]*deg)*parametr[0, 1]*sqrt(3)/3
        KRS[0, 1] ← sin(parametr[2, 1]*deg)*parametr[0, 1]*sqrt(3)/3
        KRS[0, 2] ← parametr[3, 1]
        KRS[1, 0] ← cos((parametr[2, 1] + 240)*deg)*parametr[0, 1]*sqrt(3)/3
        KRS[1, 1] ← sin((parametr[2, 1] + 240)*deg)*parametr[0, 1]*sqrt(3)/3
        KRS[1, 2] ← parametr[3, 1]
        KRS[2, 0] ← cos((parametr[2, 1] + 120)*deg)*parametr[0, 1]*sqrt(3)/3
        KRS[2, 1] ← sin((parametr[2, 1] + 120)*deg)*parametr[0, 1]*sqrt(3)/3
        KRS[2, 2] ← parametr[3, 1]
        KRS
    if parametr[1, 1] == "Р"
        KRS[0, 0] ← cos(parametr[2, 1]*deg)*parametr[0, 1]
        KRS[0, 1] ← sin(parametr[2, 1]*deg)*parametr[0, 1]
        KRS[0, 2] ← parametr[3, 1]
        KRS[1, 0] ← 0
        KRS[1, 1] ← 0
        KRS[1, 2] ← parametr[3, 1]
        KRS[2, 0] ← cos((parametr[2, 1] + 180)*deg)*parametr[0, 1]
        KRS[2, 1] ← sin((parametr[2, 1] + 180)*deg)*parametr[0, 1]
        KRS[2, 2] ← parametr[3, 1]
        KRS
    KRS
H(I, M, x, y, z) :=
    "Расчет напряжености от одного проводника"
    t ← rows(M) - 1
    Ht[0, 0] ← 0
    Ht[1, 0] ← 0
    Ht[2, 0] ← 0
    for i ∈ 0 .. t - 1
        dl[0, 0] ← M[i + 1, 0] - M[i, 0]
        dl[1, 0] ← M[i + 1, 1] - M[i, 1]
        dl[2, 0] ← M[i + 1, 2] - M[i, 2]
        rv[0, 0] ← x - M[i, 0]
        rv[1, 0] ← y - M[i, 1]
        rv[2, 0] ← z - M[i, 2]
        r ← |rv|
        dH ← dl×rv/(r*r*r*4*π)
        Ht[0, 0] ← Ht[0, 0] + dH[0, 0]
        Ht[1, 0] ← Ht[1, 0] + dH[1, 0]
        Ht[2, 0] ← Ht[2, 0] + dH[2, 0]
        Ht
    Ht ← Ht*I
    Ht
SA := solinoid(KRS(parametr)[0, 0], KRS(parametr)[0, 1], KRS(parametr)[0, 2], parametr[5, 1], parametr[4, 1], parametr[6, 1], parametr[9, 1])
SB := solinoid(KRS(parametr)[1, 0], KRS(parametr)[1, 1], KRS(parametr)[1, 2], parametr[5, 1], parametr[4, 1], parametr[6, 1], parametr[9, 1])
SC := solinoid(KRS(parametr)[2, 0], KRS(parametr)[2, 1], KRS(parametr)[2, 2], parametr[5, 1], parametr[4, 1], parametr[6, 1], parametr[9, 1])
RA := kolco(KRS(parametr)[0, 0], KRS(parametr)[0, 1], parametr[5, 1])
RB := kolco(KRS(parametr)[1, 0], KRS(parametr)[1, 1], parametr[5, 1])
RC := kolco(KRS(parametr)[2, 0], KRS(parametr)[2, 1], parametr[5, 1])
t := parametr[9, 1]
H(x, y, z) := |H(parametr[13, 1], SA, x, y, z)*e^(1i*0*deg) + H(parametr[13, 1], SB, x, y, z)*e^(1i*240*deg) + H(parametr[13, 1], SC, x, y, z)*e^(1i*120*deg)|
x := parametr[10, 1], parametr[10, 1] + parametr[12, 1] .. parametr[11, 1]
i := 0 .. 360
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H(4.8, 0, 1.5) = 1267.6
